linterp(t, R, c) =  # error: Эта переменная не определена. Проверьте правильность установки обозначения.
A := [1, 0.16, 0.16^2; 1, 0.23, 0.23^2; 1, 0.3, 0.3^2]
T := A^-1*R  # error: У {0} несколько определений. Необходимо указать надпись, чтобы выбрать требуемое определение.
T =  # error
f(c) := T[0] + T[1]*c + T[2]*c^2
f(c) =  # error
R1(i1, i2) := (R[i2] - R[i1])/(t[i2] - t[i1])  # error: У {0} несколько определений. Необходимо указать надпись, чтобы выбрать требуемое определение.
R2(i1, i2, i3) := (R1(i1, i2) - R1(i1, i3))/(t[i2] - t[i3])
N(a, i1, i2, i3) := R[i1] + (a - t[i1])*R1(i1, i2) + (a - t[i1])*(a - t[i2])*R2(i1, i2, i3)  # error: У {0} несколько определений. Необходимо указать надпись, чтобы выбрать требуемое определение.
N(c, 0, 1, 2) =  # error
l(a, i1, i2, i3) := R[i1]*[(a - t[i2])*(a - t[i3])]/[(t[i1] - t[i2])*(t[i1] - t[i3])] + R[i2]*[(a - t[i1])*(a - t[i3])]/[(t[i2] - t[i1])*(t[i2] - t[i3])] + R[i3]*[(a - t[i1])*(a - t[i2])]/[(t[i3] - t[i1])*(t[i3] - t[i2])]  # error: У {0} несколько определений. Необходимо указать надпись, чтобы выбрать требуемое определение.
l(c, 0, 1, 2) =  # error
t := [0.16; 0.23; 0.3]
R := [4.1; 3.3; 3.1]
c := 0.2
i := 0 .. 1
h[i] := t[i + 1] - t[i]
Origin := 0
h[i] = [0.07; 0.07]
M := [
    h[0], 0, 0, h[0]^3, 0;
    0, h[1], h[1]^2, 0, h[1]^3;
    -1, 1, 0, -3*h[0]^2, 0;
    0, 0, 1, -3*h[0]^2, 0;
    0, 0, 1, 0, 3*h[0]
]
W := [R[1] - R[0]; R[2] - R[1]; 0; 0; 0]
Z := M^-1*W
B := [Z[0]; Z[1]] = [-15.4339; -3.41789]
C := [0; Z[2]] = [0; 12.016]
Z = [-15.4339; -3.41789; 12.016; 817.416; -57.2191]
D := [Z[3]; Z[4]] = [817.416; -57.2191]
S := R[0] + B[0]*(c - t[0]) + C[0]*(c - t[0])^2 + D[0]*(c - t[0])^3 = 3.53496
d := cspline(t, R)
interp(d, t, R, c) = 3.5344
