x := [1; 2; 3; 4; 5]
y := [1.05; 1.55; 1.7; 1.75; 1.8]
N := length(x) - 1
i := 0 .. N
k := slope(1/x, y)
k = -0.940074
m := intercept(1/x, y)
m = 1.9993
yH(x) := if(x == 0, "error", k/x + m)
# [plot: yH(x) vs x]
yH(x) = [1.05923; 1.52926; 1.68594; 1.76428; 1.81129]
sum((y - yH(x))^2) = 0.00104409
