x := [1; 2; 3; 4; 5]
y := [1.05; 1.55; 1.7; 1.75; 1.8]
N := length(x) - 1
i := 0 .. N
a := slope(x, y)
a = 0.17
b := intercept(x, y)
b = 1.06
yLinear := a*x + b
# [plot: yLinear vs x]
yLinear = [1.23; 1.4; 1.57; 1.74; 1.91]
sum((y - yLinear)^2) = 0.084
