x := [1; 2; 3; 4; 5]
y := [1.05; 1.55; 1.7; 1.75; 1.8]
N := length(x) - 1
i := 0 .. N
k := slope(vectorize(ln(x)), y)
k = 0.463426
m := intercept(vectorize(ln(x)), y)
m = 1.12627
yL(x) := k*ln(x) + m
# [plot: yL(x) vs x]
yL(x) = [1.12627; 1.44749; 1.6354; 1.76872; 1.87213]
sum((y - yL(x))^2) = 0.026051
