x := [1; 2; 3; 4; 5]
y := [1.05; 1.55; 1.7; 1.75; 1.8]
N := length(x) - 1
i := 0 .. N
k := exp(intercept(x, vectorize(ln(y))))
k = 1.07596
m := slope(x, vectorize(ln(y)))
m = 0.119935
yP(x) := k*exp(m*x)
# [plot: yP(x) vs x]
yP(x) = [1.21306; 1.36763; 1.5419; 1.73837; 1.95989]
sum((y - yP(x))^2) = 0.110541
