x := [1; 2; 3; 4; 5]
y := [1.05; 1.55; 1.7; 1.75; 1.8]
N := length(x) - 1
i := 0 .. N
k := exp(intercept(vectorize(ln(x)), vectorize(ln(y))))
k = 1.12259
m := slope(vectorize(ln(x)), vectorize(ln(y)))
m = 0.331461
yS(x) := k*x^m
# [plot: yS(x) vs x]
yS(x) = [1.12259; 1.41254; 1.61573; 1.77739; 1.91383]
sum((y - yS(x))^2) = 0.0449725
