f(x) := sin(4*x)
t := 0, 0.125 .. 1
# [plot: f(t) vs t]
b := 1
a := π/4
integral(sin(4*x), x = 0 .. π/4) = 0.5
N := 1000
i := 1 .. N
x[i] := rnd(a)
y[i] := rnd(b)
m[i] := if(y[i] < f(x[i]), 1, 0)
M := sum(m[i], i)
# [plot: y[i], f(t) vs x[i], t]
M = 665
S := M*a*b/N
S = 0.52229
