rectangle(a, b, n, f) :=
    h ← (b - a)/n
    S ← 0
    for j ∈ 1 .. n
        x[j - 1] ← a + h*(j - 1)
        S ← S + f(x[j - 1])
    S ← S*h
    S
f(x) := sin(4*x)
rectangle(0, π/4, 1000, f) = 0.5
rectangle1(a, b, n, f) :=
    h ← (b - a)/n
    S ← 0
    for j ∈ 1 .. n
        x[j] ← a + h*j
        S ← S + f(x[j])
    S ← S*h
    S
rectangle1(0, π/4, 1000, f) = 0.5
rectangle2(a, b, n, f) :=
    h ← (b - a)/n
    S ← 0
    for j ∈ 1 .. n
        x[j] ← a + h*j
        S ← S + f(x[j] - h/2)
    S ← S*h
    S
rectangle2(0, π/4, 1000, f) = 0.5
