f(x) := 2*x^3 + x^2 - 4
a := 0
b := 3
e := 0.0001
f(a) = -4
f(b) = 59
dihot(a, b, e) :=
    k ← 0
    while 1
        c ← (a + b)/2
        if f(c)*f(a) < 0
            b ← c
        else
            a ← c
        k ← k + 1
        if |a - b| < e
            break
    [c; k]
# [plot: f(x) vs x]
dihot(a, b, e) = [1.11337; 15]
f(x) := 2*x^3 + x^2 - 4
a := 0
b := 3
e := 0.0001
horda(a, b, e) :=
    k ← 0
    while 1
        c ← a - f(a)*(b - a)/(f(b) - f(a))
        if f(c)*f(a) < 0
            b ← c
        else
            a ← c
        k ← k + 1
        if |f(c)| < e
            break
    [c; k]
horda(a, b, e) = [1.11338; 34]
